// COMSOL Multiphysics 5.6.0.280 model "1 mm coating + pollution dry (BELOW).mph"
// Outline of the model tree

Geometry
  geom1 "Geometry 1" (2D, length unit mm)
    imp1: Import | type = dxf; filename = C:\Users\user\Desktop\all new models\dry\model+poll 1.dxf
    r1: Rectangle | pos = {0, -150}; size = {250, 400}
    b2: BezierPolygon "Bézier Polygon 2"
      p = {{122, 122.4, 122.6, 122.8, 122.8, 122.8}, {10.2, 9.4, 8.6, 7.8, 7.4, 6.6}}
      degree = {2, 2, 1}
      w = {1, 0.707106781187, 1, 1, 0.707106781187, 1, 1, 1}
      type = open
    fin: Finalize "Form Union"

Materials
  mat1: Common "Porcelain" on domains 4
    def "Basic"
      relpermeability = 1
      electricconductivity = 1e-14[S/m]
      relpermittivity = 6
      density = 2210[kg/m^3]
      thermalconductivity = 1.4[W/(m*K)]
      heatcapacity = 730[J/(kg*K)]
    RefractiveIndex
      n = 1.5
      ki = 0
  mat2: Common "Iron" on domains 2, 5, 6
    def "Basic"
      relpermeability = 1
      electricconductivity = 1e7[S/m]
      thermalexpansioncoefficient = 17e-6[1/K]
      heatcapacity = 385[J/(kg*K)]
      relpermittivity = 1
      density = 8700[kg/m^3]
      thermalconductivity = 400[W/(m*K)]
    Enu "Young's modulus and Poisson's ratio"
      youngsmodulus = 110e9[Pa]
      poissonsratio = 0.35
    linzRes "Linearized resistivity"
      rho0 = 1.72e-8[ohm*m]
      alpha = 0.0039[1/K]
      Tref = 298[K]
  mat3: Common "Air" on domains 1, 9
    def "Basic"
      relpermeability = 1
      relpermittivity = 1
      dynamicviscosity = eta(T[1/K])[Pa*s]
      ratioofspecificheat = 1.4
      electricconductivity = 1e-15[S/m]
      heatcapacity = Cp(T[1/K])[J/(kg*K)]
      density = rho(pA[1/Pa],T[1/K])[kg/m^3]
      thermalconductivity = k(T[1/K])[W/(m*K)]
      soundspeed = cs(T[1/K])[m/s]
      eta: Piecewise | arg = T; pieces = {200.0, 1600.0, -8.38278E-7+8.35717342E-8*T^1-7.69429583E-11*T^2+4.6437266E-14*T^3-1.06585607E-17*T^4}
      Cp: Piecewise | arg = T; pieces = {200.0, 1600.0, 1047.63657-0.372589265*T^1+9.45304214E-4*T^2-6.02409443E-7*T^3+1.2858961E-10*T^4}
      rho: Analytic | expr = pA*0.02897/8.314/T; args = {pA, T}; dermethod = manual; argders = {{pA, d(pA*0.02897/8.314/T,pA)}, {T, d(pA*0.02897/8.314/T,T)}}
      k: Piecewise | arg = T; pieces = {200.0, 1600.0, -0.00227583562+1.15480022E-4*T^1-7.90252856E-8*T^2+4.11702505E-11*T^3-7.43864331E-15*T^4}
      cs: Analytic | expr = sqrt(1.4*287*T); args = T; dermethod = manual; argders = {T, d(sqrt(1.4*287*T),T)}
    RefractiveIndex
      n = 1
      ki = 0
  mat4: Common "cement" on domains 3
    def "Basic"
      relpermittivity = 2.1
      electricconductivity = 1e-14
  mat5: Common "SiR coating" on domains 8
    def "Basic"
      relpermittivity = 2.9
      electricconductivity = 1e-13
  mat6: Common "pollution" on domains 7
    def "Basic"
      relpermittivity = 80
      electricconductivity = 1e-7

Physics
  ec: ConductiveMedia "Electric Currents" on all domains
    dependent variable V
    cucn1: CurrentConservation (default)
    ein1: ElectricInsulation (default)
    init1: init "Initial Values 1" (default)
    gnd1: Ground on boundaries 3, 5, 17, 18, 20, 59-61
    pot1: ElectricPotential on boundaries 8-13, 15, 22, 23, 29-31, 35, 37, 62-65, 67, 70, 73, 74, 76, 81, 88
      V0 = 9333.81

Mesh
  mesh1 "Mesh 1" (physics-controlled)

Studies
  std1 "Study 1"
    freq: Frequency "Frequency Domain" | plist = 50

Solver configurations
  sol1 "Solution 1" (study std1)
    v1: Variables "Dependent Variables 1"
    s1: Stationary "Stationary Solver 1"
      dDef: Direct
      p1: Parametric | pname = freq; plistarr = 50; punit = Hz; pcontinuationmode = no
      fc1: FullyCoupled | linsolver = dDef

Datasets
  dset1: Solution | solution = sol1

Plots
  pg1: PlotGroup2D "Electric Potential (ec)" | data = dset1
    surf1: Surface | expr = ec.normE; unit = kV/cm; descr = Electric field norm
  pg2: PlotGroup1D "1D Plot Group 2" | data = dset1
    lngr1: LineGraph on boundaries 19, 32, 39, 42, 43, 48, 49, 54, 56, 69, 77, 84, 87, 90, 92, 95, 98, 104, 106, 109, 112, 115, 117, 121, 124, 127, 128, 131, 134, 138, 142, 144
      data = dset1
      expr = ec.normE
      unit = kV/cm
      descr = Electric field norm
      xdata = reversedarc
      xdataexpr = ec.normE

Exports
  plot1: Plot
    filename = C:\Users\PRANABESH\Desktop\my works\comsol models\finally final models\dry\0.5 mm coating +pollution.csv
  plot2: Plot | filename = C:\Users\user\Desktop\data for graph\dry\1 mm coating + pollution dry (BELOW).csv